// COMSOL Multiphysics 6.2.0.290 model "lg_basic.mph"
// Outline of the model tree

Parameters
  alpha = 0.5  // Charge transfer coefficient
  sigma_n = 256[S/m]  // Negative electrode conductivity
  sigma_p = 50[S/m]  // Positive electrode conductivity
  Rc_n = 0.001[ohm*m^2]  // Contact resistance in negative electrode
  Rc_p = 0.001[ohm*m^2]  // Contact resistance in positive electrode
  Ds_p = 9.396084860132817e-15[m^2/s]
  Ds_n = 1.8410158822517207e-15[m^2/s]
  k_p = 1.6470703199347508e-10[m/s]
  k_n = 9.090853198769571e-10[m/s]
  cl_ref = 1[mol/m^3]  // Reference concentration in electrolyte in kinetics expressions
  L_n = 198[um]  // Negative electrode thickness (double sided)
  L_p = 147[um]  // Positive electrode thickness (double sided)
  L_n_cc = 11[um]  // Negative CC thickness
  L_p_cc = 22[um]  // Positive CC thickness
  L_sep = 20[um]  // Separator thickness
  len_n = 0.5*(L_n-L_n_cc)  // Negative electrode thickness (single side)
  len_p = 0.5*(L_p-L_p_cc)  // Positive electrode thickness (single side)
  a_n_cyl = 39440[mm^2]  // Electrode cross-section area on negative electrode (cylinder)
  a_p_cyl = 37700[mm^2]  // Electrode cross-section area on positive electrode (cylinder)
  a_n_cc_cyl = 40600[mm^2]  // CC cross-section area on negative electrode side (cylinder)
  a_p_cc_cyl = 38280[mm^2]  // CC cross-section area on positive electrode side (cylinder)
  a_coin = 113.1[mm^2]  // Electrode cross-section area (coin)
  wfrac_n_am = 0.96  // AM weight fraction of the negative electrode
  wfrac_n_b = 0.02  // Binder weight fraction of the negative electrode
  wfrac_n_c = 0.02  // Carbon weight fraction of the negative electrode
  wfrac_p_am = 0.96  // AM weight fraction of the positive electrode
  wfrac_p_b = 0.02  // Binder weight fraction of the positive electrode
  wfrac_p_c = 0.02  // Carbon weight fraction of the positive electrode
  mass_ds_n_coin = 39.187[mg]  // Mass of double sided negative electrode coating (coin)
  mass_ds_p_coin = 55.147[mg]  // Mass of double sided positive electrode coating (coin)
  mass_n_cc_coin = 8.4907[mg]  // Mass of CC on the negative electrode side (coin)
  mass_p_cc_coin = 5.7654[mg]  // Mass of CC on the positive electrode side (coin)
  mass_ds_n_cyl = mass_ds_n_coin*a_n_cyl/a_coin  // Mass of double sided negative electrode coating (cylinder)
  mass_ds_p_cyl = mass_ds_p_coin*a_p_cyl/a_coin  // Mass of double sided positive electrode coating (cylinder)
  mass_n_cc_cyl = mass_n_cc_coin*a_n_cc_cyl/a_coin  // Mass of CC on the negative electrode side (cylinder)
  mass_p_cc_cyl = mass_p_cc_coin*a_p_cc_cyl/a_coin  // Mass of CC on the positive electrode side (cylinder)
  mass_n_coin = 0.5*(mass_ds_n_coin-mass_n_cc_coin)  // Mass of single sided negative electrode without CC (coin)
  mass_p_coin = 0.5*(mass_ds_p_coin-mass_p_cc_coin)  // Mass of single sided positive electrode without CC (coin)
  mass_n_cyl = 0.5*(mass_ds_n_cyl-mass_n_cc_cyl)  // Mass of single sided negative electrode without CC (cylinder)
  mass_p_cyl = 0.5*(mass_ds_p_cyl-mass_p_cc_cyl)  // Mass of single sided positive electrode without CC (cylinder)
  mass_n_am_coin = mass_n_coin*wfrac_n_am  // AM mass of single sided negative electrode coating (coin)
  mass_n_b_coin = mass_n_coin*wfrac_n_b  // Binder mass of single sided negative electrode coating (coin)
  mass_n_c_coin = mass_n_coin*wfrac_n_c  // Carbon mass of single sided negative electrode coating (coin)
  mass_p_am_coin = mass_p_coin*wfrac_p_am  // AM mass of single sided positive electrode coating (coin)
  mass_p_b_coin = mass_p_coin*wfrac_p_b  // Binder mass of single sided positive electrode coating (coin)
  mass_p_c_coin = mass_p_coin*wfrac_p_c  // Carbon mass of single sided positive electrode coating (coin)
  mass_n_am_cyl = mass_n_cyl*wfrac_n_am  // AM mass of single sided negative electrode coating (cylinder)
  mass_n_b_cyl = mass_n_cyl*wfrac_n_b  // Binder mass of single sided negative electrode coating (cylinder)
  mass_n_c_cyl = mass_n_cyl*wfrac_n_c  // Carbon mass of single sided negative electrode coating (cylinder)
  mass_p_am_cyl = mass_p_cyl*wfrac_p_am  // AM mass of single sided positive electrode coating (cylinder)
  mass_p_b_cyl = mass_p_cyl*wfrac_p_b  // Binder mass of single sided positive electrode coating (cylinder)
  mass_p_c_cyl = mass_p_cyl*wfrac_p_c  // Carbon mass of single sided positive electrode coating (cylinder)
  dens_n_he = 2.2363[g/cm^3]  // He pycnometry skeletal density negative electrode
  dens_p_he = 4.2632[g/cm^3]  // He pycnometry skeletal density positive electrode
  dens_n = dens_n_he*corr_n  // Density of negative active material (corrected with a multiplier)
  dens_p = dens_p_he*corr_p  // Density of positive active material (corrected with a multiplier)
  corr_n = 0.982  // Correction factor for the He pycnometry skeletal density of the negative electrode (vary to fit to the experimental capacity of cylindrical cell)
  corr_p = 0.982  // Correction factor for the He pycnometry skeletal density of the positive electrode (vary to fit to the experimental capacity of cylindrical cell)
  mweight_n = 79.01[g/mol]  // Molecular weight of LiC6 formula
  mweight_p = 97.82[g/mol]  // Molecular weight of LiNi0.8Co0.1Mn0.1O2 formula
  C_host_n_cyl = 2*F_const*mass_n_am_cyl/mweight_n  // Theoretical capacity of negative electrode (cylinder)
  C_host_p_cyl = 2*F_const*mass_p_am_cyl/mweight_p  // Theoretical capacity of positive electrode (cylinder)
  C_host_n_coin = F_const*mass_n_am_coin/mweight_n  // Theoretical capacity of negative electrode (coin)
  C_host_p_coin = F_const*mass_p_am_coin/mweight_p  // Theoretical capacity of positive electrode (coin)
  C_dch_max_n_coin = 4.809[mAh]  // Maximum discharge capacity of negative electrode half-cell at C/25 (coin)
  C_ch_max_n_coin = 4.7705[mAh]  // Maximum charge capacity of negative electrode half-cell at C/25 (coin)
  C_dch_max_p_coin = 5.2373[mAh]  // Maximum discharge capacity of positive electrode half-cell at C/25 (coin)
  C_ch_max_p_coin = 5.1649[mAh]  // Maximum charge capacity of positive electrode half-cell at C/25 (coin)
  sol_min_n = 0  // Minimum SoL on negative electrode (assumption of empty graphite after formation)
  sol_max_n = C_dch_max_n_coin/C_host_n_coin  // Maximum SoL on negative electrode
  sol_min_p = 1 - C_dch_max_p_coin/C_host_p_coin  // Minimum SoL on positive electrode
  sol_max_p = 1  // Maximum SoL on positive electrode (assumption of full NMC at discharge)
  eps_l_n_hg = 0.3522  // Electrolyte volume fraction in negative electrode (Hg porosimetry)
  eps_l_p_hg = 0.2985  // Electrolyte volume fraction in positive electrode (Hg porosimetry)
  eps_l_s_he = 0.45  // Electrolyte volume fraction in separator (He pycnometry)
  csmax_n = dens_n/mweight_n  // Maximum concentration of negative electrode (He pycnometry density reference, maybe not correct)
  csmax_p = dens_p/mweight_p  // Maximum concentration of positive electrode (He pycnometry density reference, maybe not correct)
  am_ratio_n_coin_cyl = mass_n_am_coin/(wfrac_n_am*(mass_ds_n_cyl-mass_n_cc_cyl))  // Mass ratio of AM in negative electrode between cylindrical double sided and coin single side
  am_ratio_p_coin_cyl = mass_p_am_coin/(wfrac_p_am*(mass_ds_p_cyl-mass_p_cc_cyl))  // Mass ratio of AM in positive electrode between cylindrical double sided and coin single side
  sol_0_n = 0.0044837941  // Min SoL in negative electrode (from cell balancing optimization)
  sol_100_n = 0.93431005032  // Max SoL in negative electrode (from cell balancing optimization)
  sol_0_p = 0.9374189844  // Max SoL in positive electrode (from cell balancing optimization)
  sol_100_p = 0.1935690316  // Min SoL in positive electrode (from cell balancing optimization)
  cs0_n = csmax_n*sol_0_n  // Concentration in negative electrode at 0 SOC
  cs100_n = csmax_n*sol_100_n  // Concentration in negative electrode at 100 SOC
  cs0_p = csmax_p*sol_0_p  // Concentration in positive electrode at 0 SOC
  cs100_p = csmax_p*sol_100_p  // Concentration in positive electrode at 100 SOC
  cl_0 = 1000[mol/m^3]  // Initial concentration in electrolyte
  Q_nom = 3214.9[mAh]  // Nominal capacity on discharge of cyclindrical full cell at C/25
  I_app_1C = Q_nom/1[h]  // Discharge current for 1C discharge
  C_rate_init = -0.04  // Initial C rate (it substitutes C_rate value in event Discrete State) < 0 (> 0) for discharge (charge)
  T0 = 298.15[K]  // Cell temperature
  R_n = 0.5*20[um]  // Particle radius in negative electrode
  R_p = 0.5*22[um]  // Particle radius in positive electrode
  tau_n = eps_l_n_hg^-0.5  // Tortuosity factor in negative electrode
  tau_p = eps_l_p_hg^-0.5  // Tortuosity factor in positive electrode
  tau_s = eps_l_s_he^-0.5  // Tortuosity factor in separator
  Cdl_n = 0.2[F/m^2]
  Cdl_p = 0.2[F/m^2]
  Rfilm_n = 0.005[ohm*m^2]
  Rfilm_p = 0.005[ohm*m^2]

Functions
  int1: Interpolation "Interpolation - Eeq_p (Positive Electrode) - Discharge"
    funcname = Eeq_p
    table = 
      {0.193569031661, 4.2855372}
      {0.195725264197, 4.2683296}
      {0.197881496732, 4.2589579}
      {0.200037729268, 4.2509251}
      {0.202193961804, 4.2435222}
      {0.204350194339, 4.2365918}
      {0.206506426875, 4.2306066}
      {0.208662659411, 4.2251725}
      {0.210818891946, 4.2202897}
      {0.212975124482, 4.2158008}
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    interp = piecewisecubic
    extrap = linear
    fununit = V
    argunit = 1
  int2: Interpolation "Interpolation - Eeq_n (Negative Electrode) - Charge"
    funcname = Eeq_n
    table = 
      {0, 1.8000803}
      {0.00285770368793, 1.1878327}
      {0.00571540737587, 0.94921345}
      {0.0085731110638, 0.78808528}
      {0.0114308147517, 0.68742943}
      {0.0142885184397, 0.62408125}
      {0.0171462221276, 0.57282752}
      {0.0200039258155, 0.52976811}
      {0.0228616295035, 0.49269685}
      {0.0257193331914, 0.46047121}
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    interp = piecewisecubic
    extrap = linear
    fununit = V
    argunit = 1
  an1: Analytic "Landesfeind 2019 Eq18" | funcname = Dl; expr = 1.47e3*exp(1.33*x)*exp(-1.69e3/y)*exp(-5.63e2*x/y)*10e-6; args = {x, y}; fununit = cm^2/s; argunit = {1, 1}
  an2: Analytic "Landesfeind 2019 Eq15" | funcname = sigmal; expr = 7.98e-1*(1+y-228.0)*x*(1-1.22*sqrt(x)+5.09e-1*(1.0-4e-3*exp(1000.0/y))*x)/(1+x^4*3.79e-3*exp(1000.0/y)); args = {x, y}; fununit = mS/cm; argunit = {1, 1}
  an3: Analytic "Landesfeind 2019 Eq19" | funcname = tdfl; expr = -5.58+7.17*x+3.8e-2*y+1.91*x^2-6.65e-2*x*y-5.08e-5*y^2+1.1e-1*x^3-6.1e-3*x^2*y+1.51e-4*x*y^2; args = {x, y}; fununit = 1; argunit = {1, 1}
  an4: Analytic "Landesfeind 2019 Eq20" | funcname = tplusl; expr = -7.91+2.45e-1*x+5.28e-2*y+6.98e-1*x^2-1.08e-2*x*y-8.21e-5*y^2+7.43e-4*x^3-2.22e-3*x^2*y+3.07e-5*x*y^2; args = {x, y}; fununit = 1; argunit = {1, 1}

Variables
  var1 "Initial Variables"
    E_cell = liion.phis0_ec1  // Cell voltage
    E_pos = liion.phis0_ec1-intop_ref_p(phil)  // Positive electrode potential
    E_neg = 0[V]-intop_ref_n(phil)  // Negative electrode potential
    I_app = I_app_1C*C_rate  // Applied current density
    T_operation = 1[h]/C_rate  // Operational time assesment
    T = T0  // Initial Temperature
    isoc = 1  // Initial SOC
    sol_n_init = sol_0_n+isoc*(sol_100_n-sol_0_n)  // Initial state of lithiation on negative electrode
    sol_p_init = sol_100_p+(1-isoc)*(sol_0_p-sol_100_p)  // Initial state of lithiation on positive electrode
    cs_init_n = csmax_n*sol_n_init  // Initial concentration on negative electrode
    cs_init_p = csmax_p*sol_p_init  // Initial concentration on positive electrode

Couplings
  intop1: Integration on boundaries 3 | opname = intop_ref_p
  intop2: Integration on boundaries 2 | opname = intop_ref_n

Geometry
  geom1 "Geometry 1" (1D, length unit m)
    i1: Interval | specify = len; len = {L_n, L_sep, L_p}
    fin: Finalize "Form Union"

Physics
  liion: LithiumIonBatteryMPH "Lithium-Ion Battery" on all domains
    dependent variable phil
    Ac.Ac = a_p_cyl
    CellSettings.CellSOCandInitialChargeInventory = 0
    sep1: Separator (default)
      sigmal_mat = userdef
      sigmal = sigmal(cl/1000[mol/m^3], T/1[K])
      Dl_mat = userdef
      Dl = Dl(cl/1000[mol/m^3], T/1[K])
      transpNum_mat = userdef
      transpNum = tplusl(cl/1000[mol/m^3], T/1[K])
      fcl_mat = userdef
      fcl = tdfl(cl/1000[mol/m^3], T/1[K])
      epsl = eps_l_s_he
      taul = tau_s
      IonicCorrModel = Tortuosity
      DiffusionCorrModel = Tortuosity
    nf1: NoFlux (default)
    ins1: Insulation (default)
    init1: init "Initial Values 1" (default) | cl = cl_0
    pce1: PorousElectrode on domains 1
      sigmal_mat = userdef
      sigmal = sigmal(cl/1000[mol/m^3], T/1[K])
      Dl_mat = userdef
      Dl = Dl(cl/1000[mol/m^3], T/1[K])
      transpNum_mat = userdef
      transpNum = tplusl(cl/1000[mol/m^3], T/1[K])
      fcl_mat = userdef
      fcl = tdfl(cl/1000[mol/m^3], T/1[K])
      sigma = sigma_n
      epsl = eps_l_n_hg
      taul = tau_n
      epss = 1-eps_l_n_hg
      IonicCorrModel = Tortuosity
      ElectricCorrModel = NoCorr
      DiffusionCorrModel = Tortuosity
      FilmResistanceType = SurfaceResistance
      Rfilm = Rfilm_n
      pin1: ParticleIntercalation (default)
        Ds_mat = userdef
        Ds = Ds_n
        cEeqref_mat = userdef
        cEeqref = csmax_n
        socmin_mat = userdef
        socmin = 0
        socmax_mat = userdef
        socmax = 1
        rp = R_n
        ParticleType = Spheres
        csinit = cs_init_n
      per1: PorousElectrodeReaction (default)
        Eeq_mat = userdef
        Eeq = Eeq_n(liion.cs_surface/csmax_n)
        i0refType = FromRateConstant
        k = k_n
        alphaa = alpha
        alphac = 1-alpha
        cl_ref = cl_ref
        ActiveSpecificSurfaceAreaType = ParticleBasedArea
        dEeqdT_mat = userdef
        dEeqdT = 0
      pdl1: PorousMatrixDoubleLayerCapacitance on all domains | Cdl = Cdl_n
    pce2: PorousElectrode on domains 3
      sigmal_mat = userdef
      sigmal = sigmal(cl/1000[mol/m^3], T/1[K])
      Dl_mat = userdef
      Dl = Dl(cl/1000[mol/m^3], T/1[K])
      transpNum_mat = userdef
      transpNum = tplusl(cl/1000[mol/m^3], T/1[K])
      fcl_mat = userdef
      fcl = tdfl(cl/1000[mol/m^3], T/1[K])
      sigma = sigma_p
      epsl = eps_l_p_hg
      taul = tau_p
      epss = 1-eps_l_p_hg
      IonicCorrModel = Tortuosity
      ElectricCorrModel = NoCorr
      DiffusionCorrModel = Tortuosity
      FilmResistanceType = SurfaceResistance
      Rfilm = Rfilm_p
      pin1: ParticleIntercalation (default)
        Ds_mat = userdef
        Ds = Ds_p
        cEeqref_mat = userdef
        cEeqref = csmax_p
        socmin_mat = userdef
        socmin = 0
        socmax_mat = userdef
        socmax = 1
        rp = R_p
        csinit = cs_init_p
      per1: PorousElectrodeReaction (default)
        Eeq_mat = userdef
        Eeq = Eeq_p(liion.cs_surface/csmax_p)
        i0refType = FromRateConstant
        k = k_p
        alphaa = alpha
        alphac = 1-alpha
        cl_ref = cl_ref
        dEeqdT_mat = userdef
        dEeqdT = 0
      pdl1: PorousMatrixDoubleLayerCapacitance on all domains | Cdl = Cdl_p
    egnd1: ElectricGround on boundaries 1 | IncludeContactResistance = 1; Rc = Rc_n
    ec1: ElectrodeCurrent on boundaries 4
      ElectronicCurrentType = TotalCurrent
      Its = I_app
      Ias = I_app
      phis0init = Eeq_p(cs_init_p/csmax_p)
      IncludeContactResistance = 1
      Rc = Rc_p
  ev: Events on all domains
    ds1: DiscreteStates | dim = C_rate; dimInit = C_rate_init

Mesh
  mesh1 "Mesh 1" (physics-controlled)

Studies
  std1 "Study 1"
    cdi: CurrentDistributionInitialization
    time: Transient "Time Dependent"
      tlist = range(0,abs(3600/C_rate_init)/1000,abs(5000/C_rate_init))
      initialtime = 0
      usertol = on
      rtol = 0.0001

Solver configurations
  sol1 "Solution 1" (study std1)
    v1: Variables "Dependent Variables 1"
      comp1_cl: Field "Electrolyte salt concentration (comp1.cl)" | scalemethod = manual; scaleval = 1000
      comp1_phil: Field "Electrolyte potential (comp1.phil)" | scalemethod = manual; scaleval = 1
      comp1_phis: Field "Electric potential (comp1.phis)" | scalemethod = manual; scaleval = 1
      comp1_liion_ec1_phis0: State "Electric potential on boundary (comp1.liion.ec1.phis0)"
        scalemethod = manual
        scaleval = 1
    s1: Stationary "Stationary Solver 1" | stol = 1.0E-4
      fc1: FullyCoupled | linsolver = d1; minstep = 1.0E-6; maxiter = 50
      d1: Direct "Direct (liion)" | linsolver = pardiso
    su1: StoreSolution "Solution Store 1"
    v2: Variables "Dependent Variables 2" | initmethod = sol; notsolmethod = sol
      comp1_cl: Field "Electrolyte salt concentration (comp1.cl)" | scalemethod = manual; scaleval = 1000
      comp1_liion_pce1_cs: Field "Solid phase concentration (comp1.liion.pce1.cs)"
        scalemethod = manual
        scaleval = 10000
      comp1_liion_pce2_cs: Field "Solid phase concentration (comp1.liion.pce2.cs)"
        scalemethod = manual
        scaleval = 10000
      comp1_phil: Field "Electrolyte potential (comp1.phil)" | scalemethod = manual; scaleval = 1
      comp1_phis: Field "Electric potential (comp1.phis)" | scalemethod = manual; scaleval = 1
      comp1_liion_ec1_phis0: State "Electric potential on boundary (comp1.liion.ec1.phis0)"
        scalemethod = manual
        scaleval = 1
    t1: Time "Time-Dependent Solver 1"
      tlist = range(0,abs(3600/C_rate_init)/1000,abs(5000/C_rate_init))
      tout = tsteps
      tstepsstore = 5
      rtol = 0.0001
      initialstepbdf = (1)[s]
      maxorder = 2
      eventout = on
      fc1: FullyCoupled | linsolver = d1; dtech = auto
      d1: Direct "Direct (liion)" | linsolver = pardiso
      st1: StopCondition
        stopcondterminateon = {true, true}
        stopconddesc = {Stop expression 1, Stop expression 2}
        stopcondarr = {comp1.E_cell<2.5[V], comp1.E_cell>4.3[V]}
  sol2 "Solution Store 1" (study std1)

Datasets
  dset1: Solution | solution = sol1
  dset2: Solution | solution = sol2
  int1_ds1: Grid1D
  ptds1: CutPoint1D
    data = int1_ds1
    pointx = 0.21 0.21004478 0.219269532 0.261497402 0.332354842 0.409317336 0.474174208 0.526985168 0.560316674 0.575706188 0.582273973 0.585975815 0.590901654 0.598588947 0.655863013 0.696598205 0.741871138 0.802205196 0.864031932 0.930500897 0.959279735 0.979341333 0.980053837 0.983058101 0.992282853 0.996268304 0.999940293
  int2_ds1: Grid1D "Grid 1D 1a"
  ptds2: CutPoint1D
    data = int2_ds1
    pointx = 0.001436794 0.001643334 0.00811789 0.01027308 0.035479844 0.060758448 0.090185795 0.127982471 0.169900951 0.232688871 0.320485995 0.403954777 0.483167055 0.574861484 0.687380455 0.799899424 0.891593855 0.960353451 0.987446008 0.995806356

Derived values
  gev1: EvalGlobal "Global Evaluation 1"
    data = dset1
    table = tbl1
    expr = {C_rate, I_app}
    descr = {"Discrete state, -component", Applied current density}

Tables
  tbl1: Table
    // Global Evaluation 1
    Time (s) | Discrete state, -component | Applied current density (A)
    0 | 1 | 3.2149
    0.111375 | 1 | 3.2149
    0.267625 | 1 | 3.2149
    0.517625 | 1 | 3.2149
    1.08735 | 1 | 3.2149
    2.09523 | 1 | 3.2149
    3.07711 | 1 | 3.2149
    4.84451 | 1 | 3.2149
    6.80828 | 1 | 3.2149
    8.77205 | 1 | 3.2149
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
Plots
  pg9: PlotGroup1D "Boundary Electrode Potential with Respect to Ground (liion) 1" | data = dset1
    glob1: Global
      expr = liion.phis0_ec1
      unit = V
      descr = Electric potential on boundary
      xdata = expr
      xdataexpr = (-t*I_app)*0.00027778
  pg10: PlotGroup1D "Average Electrode State of Charge (liion) 1" | data = dset1
    glob1: Global
      expr = {liion.soc_average_pce1, liion.soc_average_pce2}
      unit = {1, 1}
      descr = {"Average SOC, Porous Electrode 1", "Average SOC, Porous Electrode 2"}
  pg11: PlotGroup1D "Electrolyte Potential (liion) 1" | data = dset1
    lngr1: LineGraph on domains 1-3 | expr = phil; xdata = expr; xdataexpr = x
  pg12: PlotGroup1D "Electrode Potential with Respect to Ground (liion) 1" | data = dset1
    lngr1: LineGraph on domains 1-3 | expr = phis; xdata = expr; xdataexpr = x
  pg13: PlotGroup1D "Electrolyte Salt Concentration (liion) 1" | data = dset1
    lngr1: LineGraph on domains 1-3 | expr = cl; xdata = expr; xdataexpr = x