// COMSOL Multiphysics 6.2.0.290 model "nib_withsoc.mph"
// 1D Isothermal Sodium-Ion Battery
// This example demonstrates how to use the Lithium-Ion Battery interface for modeling a sodium-ion battery. The geometry is in one dimension and the model is isothermal.
// The sodium-ion battery chemistry has many similarities to the lithium-ion battery chemistry, and can often be described by the same equations for charge and mass transport, electrode kinetics, and electrode particle intercalation.
// Outline of the model tree

Parameters
  T0 = 298.15[K]  // Cell temperature
  csmax_n = 14540[mol/m^3]  // Max concentration in negative electrode
  csmax_p = 15320[mol/m^3]  // Max concentration in positive electrode
  sol_0_n = 0.001436794  // Min SoL in negative electrode
  sol_100_p = 0.21  // Min SoL in positive electrode
  sol_100_n = 0.995806356  // Max SoL in negative electrode
  sol_0_p = 0.999940293  // Max SoL in positive electrode
  cs0_n = csmax_n*sol_0_n  // Concentration in negative electrode at 0 SOC
  cs100_n = csmax_n*sol_100_n  // Concentration in negative electrode at 100 SOC
  cs0_p = csmax_p*sol_0_p  // Concentration in positive electrode at 0 SOC
  cs100_p = csmax_p*sol_100_p  // Concentration in positive electrode at 100 SOC
  cl_0 = 1000[mol/m^3]  // Initial concentration in electrolyte
  alpha = 0.5  // Charge transfer coefficient
  tplus = 0.45  // Transfer number
  sigmaeff_n = 256[S/m]  // Negative electrode conductivity
  sigmaeff_p = 50[S/m]  // Positive electrode conductivity
  Rct_n = 2[mohm*m^2]  // Contact resistance in negative electrode
  Rct_p = 8.5[mohm*m^2]  // Contact resistance in positive electrode
  Ds_p = 9.396084860132817e-15[m^2/s]
  Ds_n = 1.8410158822517207e-15[m^2/s]
  k_p = 1.6470703199347508e-10[m/s]
  k_n = 9.090853198769571e-10[m/s]
  E_min = 2.5  // Minimum voltage
  cl_ref = 1[mol/m^3]  // Reference concentration in electrolyte in kinetics expressions
  I_app_1C = Q_nom/1[h]
  Q_n_100 = (cs100_n-cs0_n)*(1-epsl_n-epsf_n)*L_n*F_const  // Host areal capacity in negative electrode at 100 SOC
  Q_p_0 = (cs0_p-cs100_p)*(1-epsl_p-epsf_p)*L_p*F_const  // Host areal capacity in positive electrode at 0 SOC
  Q_nom = min(Q_n_100, Q_p_0)  // Nominal discharge capacity of cell
  L_n = 64[um]  // Negative electrode thickness
  L_p = 68[um]  // Positive electrode thickness
  L_sep = 25[um]  // Separator thickness
  Acc = 2.54[cm^2]  // Electrode cross-section area
  R_n = 3.48[um]  // Particle radius in negative electrode
  R_p = 0.59[um]  // Particle radius in positive electrode
  epsl_n = 0.51  // Electrolyte volume fraction in negative electrode
  epsl_p = 0.23  // Electrolyte volume fraction in positive electrode
  epsl_sep = 0.55  // Electrolyte volume fraction in separator
  epsf_n = 0.001  // Filler volume fraction in negative electrode
  epsf_p = 0.22  // Filler volume fraction in positive electrode
  mweight_p = 337.53[g/mol]  // Molar mass of positive electrode active material
  mweight_n = 119.08[g/mol]  // Molar mass of negative electrode active material
  Q_dis_max_p = 3.5[C]  // Maximum discharge capacity of a half coin cell for the positive active material (positive in half cell)
  Q_dis_max_n = 9[C]  // Maximum discharge capacity of a half coin cell for the negative active material (positive in half cell)
  mass_p = 13[mg]  // Mass of positive active material in the half coin cell positive electrode
  mass_n = 13[mg]  // Mass of positive active material in the half coin cell negative electrode
  sol_min_p = 1 - Q_dis_max_p/Q_host_p  // Min state of lithiation of the positive electrode material (measured with a qOCV at half coin cell)
  Q_host_p = F_const*mass_p/mweight_p  // Maximum host capacity of a half coin cell for the positive active material (positive in half cell)
  Q_host_n = F_const*mass_n/mweight_n  // Maximum host capacity of a half coin cell for the negative active material (positive in half cell)
  sol_min_n = 1 - Q_dis_max_n/Q_host_n  // Min state of lithiation of the negative electrode material (measured with a qOCV at half coin cell)

Functions
  int1: Interpolation "Interpolation - Eeq_p (Positive Electrode)"
    funcname = Eeq_p
    table = 
      {0.21, 4.288102031}
      {0.21004478, 4.210892773}
      {0.219269532, 4.175283892}
      {0.261497402, 4.172472367}
      {0.332354842, 4.172738781}
      {0.409317336, 4.158176665}
      {0.474174208, 4.152479924}
      {0.526985168, 4.143767596}
      {0.560316674, 4.11121965}
      {0.575706188, 4.048901275}
      {0.582273973, 3.941995276}
      {0.585975815, 3.805375531}
      {0.590901654, 3.725196032}
      {0.598588947, 3.695521965}
      {0.655863013, 3.698707605}
      {0.696598205, 3.69292017}
      {0.741871138, 3.684179499}
      {0.802205196, 3.678465753}
      {0.864031932, 3.675727917}
      {0.930500897, 3.649245158}
      {0.959279735, 3.62262069}
      {0.979341333, 3.530616911}
      {0.980053837, 3.450437411}
      {0.983058101, 3.391026925}
      {0.992282853, 3.355418044}
      {0.996268304, 3.162363722}
      {0.999940293, 3.031684459}
    interp = piecewisecubic
    extrap = linear
    fununit = V
    argunit = 1
  int2: Interpolation "Interpolation - Eeq_n (Negative Electrode)"
    funcname = Eeq_n
    table = 
      {0.001436794, 1.318963892}
      {0.001643334, 1.21982507}
      {0.00811789, 1.112038542}
      {0.01027308, 1.077546494}
      {0.035479844, 0.978299913}
      {0.060758448, 0.844570264}
      {0.090185795, 0.719443422}
      {0.127982471, 0.577039126}
      {0.169900951, 0.456168787}
      {0.232688871, 0.317967115}
      {0.320485995, 0.1753473}
      {0.403954777, 0.110332349}
      {0.483167055, 0.088439192}
      {0.574861484, 0.075112923}
      {0.687380455, 0.066007238}
      {0.799899424, 0.056901553}
      {0.891593855, 0.043575284}
      {0.960353451, 0.038968561}
      {0.987446008, 0.034541438}
      {0.995806356, 0.021574368}
    interp = piecewisecubic
    extrap = linear
    fununit = V
    argunit = 1
  int3: Interpolation "Interpolation - Ds_p" (disabled)
    funcname = Ds_p
    table = 
      {0.131578947, 2.51E-15}
      {0.592105263, 1.71E-15}
      {1.052631579, 1.16E-15}
      {1.535087719, 7.41E-16}
      {2.01754386, 4.61E-16}
      {2.521929825, 2.62E-16}
      {2.98245614, 1.56E-16}
      {3.355263158, 9.92E-17}
      {3.618421053, 7.92E-17}
      {3.925438596, 6.61E-17}
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    interp = piecewisecubic
    extrap = linear
    fununit = m^2/s
    argunit = kmol/m^3
  int4: Interpolation "Interpolation - Ds_n" (disabled)
    funcname = Ds_n
    table = 
      {0.073891626, 2.57E-16}
      {0.246305419, 3.03E-16}
      {0.418719212, 3.54E-16}
      {0.714285714, 3.99E-16}
      {1.108374384, 4.50E-16}
      {1.477832512, 4.83E-16}
      {1.84729064, 5.31E-16}
      {2.24137931, 6.21E-16}
      {2.733990148, 7.60E-16}
      {3.177339901, 9.20E-16}
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    interp = piecewisecubic
    extrap = linear
    fununit = m^2/s
    argunit = kmol/m^3
  int5: Interpolation "Interpolation - k_p" (disabled)
    funcname = k_p
    table = 
      {0.021929825, 2.27E-10}
      {0.372807018, 1.74E-10}
      {0.833333333, 1.24E-10}
      {1.293859649, 8.51E-11}
      {1.907894737, 4.83E-11}
      {2.456140351, 2.96E-11}
      {2.960526316, 1.95E-11}
      {3.442982456, 1.45E-11}
      {3.969298246, 1.16E-11}
      {4.802631579, 1.08E-11}
      {5.548245614, 1.17E-11}
      {6.381578947, 1.18E-11}
      {7.192982456, 1.10E-11}
      {8.092105263, 8.79E-12}
      {8.969298246, 6.65E-12}
      {9.649122807, 5.03E-12}
      {10.35087719, 3.87E-12}
      {11.0745614, 3.34E-12}
      {12.17105263, 3.37E-12}
      {13.22368421, 3.60E-12}
      {14.18859649, 3.30E-12}
      {14.93421053, 2.35E-12}
      {15.32894737, 1.91E-12}
    interp = piecewisecubic
    extrap = linear
    fununit = m/s
    argunit = kmol/m^3
  int6: Interpolation "Interpolation - k_n" (disabled)
    funcname = k_n
    table = 
      {0.121359223, 3.33E-11}
      {0.412621359, 2.15E-11}
      {0.631067961, 1.39E-11}
      {0.800970874, 9.40E-12}
      {0.970873786, 6.88E-12}
      {1.140776699, 5.71E-12}
      {1.262135922, 5.26E-12}
      {1.529126214, 7.03E-12}
      {1.796116505, 1.04E-11}
      {2.063106796, 1.58E-11}
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    interp = piecewisecubic
    extrap = linear
    fununit = m/s
    argunit = kmol/m^3
  int7: Interpolation "Interpolation - Dl"
    funcname = Dl
    table = 
      {0.001131153, 4.14E-11}
      {0.124121064, 3.87E-11}
      {0.24937328, 3.62E-11}
      {0.387618465, 3.33E-11}
      {0.538734332, 3.11E-11}
      {0.741699786, 2.81E-11}
      {1.013696117, 2.49E-11}
      {1.27269948, 2.25E-11}
      {1.51427698, 2.14E-11}
      {1.811953531, 1.99E-11}
      {2.113940691, 1.86E-11}
      {2.32097218, 1.79E-11}
      {2.471904616, 1.76E-11}
    interp = piecewisecubic
    extrap = linear
    fununit = m^2/s
    argunit = kmol/m^3
  int8: Interpolation "Interpolation - sigmal" | funcname = sigmal; table = {{0.15, 4.04}, {0.5, 7.2}, {1, 8.83}, {1.5, 8.61}, {2, 7.6}}; interp = piecewisecubic; extrap = linear; fununit = mS/cm; argunit = kmol/m^3

Variables
  var1 "Variables 1"
    E_cell = liion.phis0_ec1  // Cell voltage
    E_pos = liion.phis0_ec1-intop_ref_p(phil)  // Positive electrode potential
    E_neg = 0[V]-intop_ref_n(phil)  // Negative electrode potential
    isoc = 0.555041701859031  // Initial SOC
    Q_init_dis = Q_nom*isoc
    Q_init_chg = Q_nom*(1-isoc)
    cs_init_n = Q_init_dis/(1-epsl_n-epsf_n)/L_n/F_const+cs0_n
    cs_init_p = Q_init_chg/(1-epsl_p-epsf_p)/L_p/F_const+cs100_p
    I_app = I_app_1C*C_rate  // Applied current density
    T_operation = 1[h]/C_rate  // Operational time assesment

Couplings
  intop1: Integration on boundaries 3 | opname = intop_ref_p
  intop2: Integration on boundaries 2 | opname = intop_ref_n

Geometry
  geom1 "Geometry 1" (1D, length unit m)
    i1: Interval | specify = len; len = {L_n, L_sep, L_p}
    fin: Finalize "Form Union"

Physics
  liion: LithiumIonBatteryMPH "Sodium-Ion Battery" on all domains
    dependent variable phil
    Ac.Ac = Acc
    CellSettings.CellSOCandInitialChargeInventory = 0
    sep1: Separator (default)
      sigmal_mat = userdef
      sigmal = sigmal(cl)
      Dl_mat = userdef
      Dl = Dl(cl)
      transpNum_mat = userdef
      transpNum = tplus
      fcl_mat = userdef
      fcl = 0
      epsl = epsl_sep
    nf1: NoFlux (default)
    ins1: Insulation (default)
    init1: init "Initial Values 1" (default) | cl = cl_0
    pce1: PorousElectrode on domains 1
      sigmal_mat = userdef
      sigmal = sigmal(cl)
      Dl_mat = userdef
      Dl = Dl(cl)
      transpNum_mat = userdef
      transpNum = tplus
      fcl_mat = userdef
      fcl = 0
      sigma = sigmaeff_n
      epsl = epsl_n
      epss = 1-epsf_n-epsl_n
      ElectricCorrModel = NoCorr
      pin1: ParticleIntercalation (default)
        Ds_mat = userdef
        Ds = Ds_n
        cEeqref_mat = userdef
        cEeqref = csmax_n
        socmin_mat = userdef
        socmin = 0
        socmax_mat = userdef
        socmax = 1
        rp = R_n
        csinit = cs_init_n
      per1: PorousElectrodeReaction (default)
        Eeq_mat = userdef
        Eeq = Eeq_n(liion.cs_surface/csmax_n)
        i0refType = FromRateConstant
        k = k_n
        alphaa = alpha
        alphac = 1-alpha
        cl_ref = cl_ref
        dEeqdT_mat = userdef
        dEeqdT = 0
    pce2: PorousElectrode on domains 3
      sigmal_mat = userdef
      sigmal = sigmal(cl)
      Dl_mat = userdef
      Dl = Dl(cl)
      transpNum_mat = userdef
      transpNum = tplus
      fcl_mat = userdef
      fcl = 0
      sigma = sigmaeff_p
      epsl = epsl_p
      epss = 1-epsf_p-epsl_p
      ElectricCorrModel = NoCorr
      pin1: ParticleIntercalation (default)
        Ds_mat = userdef
        Ds = Ds_p
        cEeqref_mat = userdef
        cEeqref = csmax_p
        socmin_mat = userdef
        socmin = 0
        socmax_mat = userdef
        socmax = 1
        rp = R_p
        csinit = cs_init_p
      per1: PorousElectrodeReaction (default)
        Eeq_mat = userdef
        Eeq = Eeq_p(liion.cs_surface/csmax_p)
        i0refType = FromRateConstant
        k = k_p
        alphaa = alpha
        alphac = 1-alpha
        cl_ref = cl_ref
        dEeqdT_mat = userdef
        dEeqdT = 0
    egnd1: ElectricGround on boundaries 1 | IncludeContactResistance = 1; Rc = Rct_n
    ec1: ElectrodeCurrent on boundaries 4
      ElectronicCurrentType = AverageCurrentDensity
      Ias = I_app
      phis0init = Eeq_p(cs_init_p/csmax_p)
      IncludeContactResistance = 1
      Rc = Rct_p

Mesh
  mesh1 "Mesh 1" (physics-controlled)

Studies
  std1 "Study 1"
    cdi: CurrentDistributionInitialization
    time: Transient "Time Dependent"
      tlist = range(0,0.219161380392,284.909794509)
      initialtime = 0
      usertol = on
      rtol = 0.0001

Solver configurations
  sol1 "Solution 1" (study std1)
    v1: Variables "Dependent Variables 1"
      comp1_cl: Field "Electrolyte salt concentration (comp1.cl)" | scalemethod = manual; scaleval = 1000
      comp1_phil: Field "Electrolyte potential (comp1.phil)" | scalemethod = manual; scaleval = 1
      comp1_phis: Field "Electric potential (comp1.phis)" | scalemethod = manual; scaleval = 1
      comp1_liion_ec1_phis0: State "Electric potential on boundary (comp1.liion.ec1.phis0)"
        scalemethod = manual
        scaleval = 1
    s1: Stationary "Stationary Solver 1" | stol = 1.0E-4
      fc1: FullyCoupled | linsolver = d1; minstep = 1.0E-6; maxiter = 50
      d1: Direct "Direct (liion)" | linsolver = pardiso
    su1: StoreSolution "Solution Store 1"
    v2: Variables "Dependent Variables 2" | initmethod = sol; notsolmethod = sol
      comp1_cl: Field "Electrolyte salt concentration (comp1.cl)" | scalemethod = manual; scaleval = 1000
      comp1_liion_pce1_cs: Field "Solid phase concentration (comp1.liion.pce1.cs)"
        scalemethod = manual
        scaleval = 10000
      comp1_liion_pce2_cs: Field "Solid phase concentration (comp1.liion.pce2.cs)"
        scalemethod = manual
        scaleval = 10000
      comp1_phil: Field "Electrolyte potential (comp1.phil)" | scalemethod = manual; scaleval = 1
      comp1_phis: Field "Electric potential (comp1.phis)" | scalemethod = manual; scaleval = 1
      comp1_liion_ec1_phis0: State "Electric potential on boundary (comp1.liion.ec1.phis0)"
        scalemethod = manual
        scaleval = 1
    t1: Time "Time-Dependent Solver 1"
      tlist = range(0,0.219161380392,284.909794509)
      tstepsstore = 5
      rtol = 0.0001
      initialstepbdf = 0.1
      maxorder = 2
      eventout = on
      fc1: FullyCoupled | linsolver = d1; dtech = auto
      d1: Direct "Direct (liion)" | linsolver = pardiso
      st1: StopCondition | stopcondterminateon = true; stopconddesc = Stop expression 1; stopcondarr = comp1.E_cell<2[V]
  sol2 "Solution Store 1" (study std1)
  sol3 "Parametric Solutions 1" (study std1)

Datasets
  dset1: Solution | solution = sol1
  dset2: Solution | solution = sol2
  dset3: Solution | solution = sol3