// COMSOL Multiphysics 6.2.0.339 model "test1.mph"
// Outline of the model tree

Parameters
  L_sep = 10[um]  // Separator thickness
  L_pos = 52[um]  // Positive electrode thickness
  eps_l_s = 0.4  // Electrolyte volume fraction in separator
  eps_s_LMO = 0.4346  // Electrolyte volume fraction in LMO
  eps_l_LMO = 0.36  // Electrolyte volume fraction in LMO
  dens_LMO = 4.22 [g/cm^3]  // Bulk Density LMO
  mass_LMO = L_pos*area_electrode*eps_s_LMO*dens_LMO
  area_electrode = 100*100[um^2]
  D_LMO = 3.150399531146733e-17[m^2/s]  // Difusion coefficient LMO
  i0_ref_LMO = 2.380866677725213[A/m^2]  // reference exchange current LMO
  grav_cap_LMO = 104.85 [mAh/g]  // Practical gravimetric capacity LMO
  th_grav_cap_LMO = 148 [mAh/g]  // Theoretical gravimetric capacity LMO
  csrefLMO = th_grav_cap_LMO*dens_LMO/F_const  // Max theoretical lithium concentration
  csmaxLMO = 22860[mol/m^3]  // Max lithium concentration in LMO
  csminLMO = csmaxLMO - grav_cap_LMO*dens_LMO/F_const  // Min lithium concentration in LMO
  socmax_LMO = csmaxLMO/csrefLMO  // Maximum SOC LMO
  socmin_LMO = csminLMO/csrefLMO  // Minimum SOC LMO
  i0_ref_Li = 100[A/m^2]  // Reference exchange current density for lithium deposition/dissolution
  sigma_s = 700[S/m]  // Porous conductive binder conductivity
  Capacity = csrefLMO*(socmax_LMO - socmin_LMO)*F_const*L_pos*area_electrode*eps_s_LMO  // Capacity of the blend
  Loading = Capacity/10000 [um^2]
  mAh_Loading = Loading*0.27777/10000  // Loading in mAh/cm^2
  rpLMO = 210.95834320966242[nm]  // particle radius of LMO
  Einit = 4.297 [V]
  struct_cap_LMO = 121 [mAh/g]  // Capacity used for structure generation
  sigma_LMO = 69.39429380710475[S/m]
  I_1C = Capacity/1[h]  // 1C discharge current

Functions
  int1: Interpolation "Reference1C"
    funcname = ref1C
    table = 
      {0.000067, 4.264504}
      {0.047943, 4.244452}
      {0.190229, 4.224400}
      {0.460250, 4.204386}
      {0.919426, 4.184334}
      {1.684563, 4.164321}
      {2.957221, 4.144308}
      {5.257866, 4.124255}
      {10.817288, 4.104242}
      {26.087080, 4.084229}
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  int2: Interpolation "Reference0.1C"
    funcname = refC10
    table = 
      {0.000007, 4.294997}
      {0.058086, 4.274944}
      {0.177878, 4.254931}
      {0.392901, 4.234879}
      {0.783120, 4.214866}
      {1.483147, 4.194852}
      {2.728199, 4.174840}
      {5.020134, 4.154826}
      {10.183323, 4.134813}
      {32.199117, 4.114800}
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
Variables
  var1 "SOC init"
    socinit_LMO = 0.3
    csinitLMO = socinit_LMO*csrefLMO

Probes
  var1: GlobalVariable "Global Variable Probe 1 - E cell"
    expr = liion.phis0_ec1
    unit = V
    descr = Cell voltage
    table = tbl11
  dom1: Domain "Domain Probe 1" on domains 2
    expr = liion.cs_average
    unit = mol/m^3
    descr = Insertion particle concentration, particle average
    table = tbl11
  dom2: Domain "Domain Probe 2" on all domains | expr = phil; unit = V; descr = Electrolyte potential; table = tbl11

Geometry
  geom1 "Geometry 1" (1D, length unit µm)
    i1: Interval | specify = len; len = {0, L_sep, L_pos}
    fin: Finalize "Form Union"

Materials
  mat1: Common "Lithium Metal, Li (Negative, Li-ion Battery)" on boundaries 1
    def "Basic"
      youngsmodulus = 2[GPa]
      poissonsratio = 0.34
      density = 0.534[g/cm^3]
      thermalconductivity = 84.8[W/(m*K)]
      electricconductivity = 1/(92.8[nΩ*m])
      heatcapacity = 3.58[kJ/kg/K]
    ElectrodePotential "Equilibrium potential"
      Eeq = 0[V]
      dEeqdT = 0[V/K]
      cEeqref = 0[M]
  mat2: Common "LMO, LiMn2O4 Spinel (Positive, Li-ion Battery)" on domains 2
    def "Basic"
      youngsmodulus = 194[GPa]
      poissonsratio = 0.26
      electricconductivity = sigma_LMO
      diffusion = D_LMO
      density = 4140[kg/m^3]
      T_ref = 298[K]
      T2 = min(393.15,max(T,223.15))
      soc = liion.cs_average/csmaxLMO
    ElectrodePotential "Equilibrium potential"
      Eeq = Eeq_int1(soc)
      dEeqdT = dEeqdT_int1(soc)
      cEeqref = csrefLMO
      soc = c/cEeqref
      int1: Interpolation "OCV LMO Dimitrios"
        funcname = Eeq_int1
        table = 
          {0.27254, 4.2980227}
          {0.277262933333, 4.2464294}
          {0.281985866667, 4.2230787}
          {0.2867088, 4.207983}
          {0.291431733333, 4.1967473}
          {0.296154666667, 4.1879382}
          {0.3008776, 4.1807532}
          {0.305600533333, 4.1745625}
          {0.310323466667, 4.16925}
          {0.3150464, 4.1645684}
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        interp = piecewisecubic
        extrap = linear
        fununit = V
        defineinv = on
      int2: Interpolation
        funcname = dEeqdT_int1
        table = 
          {0.15, 0.15e-3}
          {0.18, 0.25e-3}
          {0.20, 0.21e-3}
          {0.209, 0.19e-3}
          {0.26, 0.175e-3}
          {0.28, 0.166e-3}
          {0.30, 0.155e-3}
          {0.35, 0.11e-3}
          {0.394, 0.095e-3}
          {0.41, 0.05e-3}
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        interp = piecewisecubic
        fununit = V/K
    OperationalSOC "Operational electrode state-of-charge"
      socmax = socmax_LMO
      socmin = socmin_LMO
  mat3: Common "LiPF6 in 1:1 EC:DMC (Liquid, Li-ion Battery)" on domains 1
    def "Basic"
      diffusion = int1(c/1[mol/m^3])
      int1: Interpolation
        table = 
          {17.7514792899, 5.62745098039e-10}
          {186.390532544, 5.1568627451e-10}
          {426.035502959, 4.54901960784e-10}
          {621.301775147929, 4.09803921569e-10}
          {860.9467455621302, 3.60784313725e-10}
          {1127.2189349112425, 3.13725490196e-10}
          {1375.739644970414, 2.76470588235e-10}
          {1677.5147928994081, 2.35294117647e-10}
          {1934.9112426035501, 2.05882352941e-10}
          {2139.0532544378693, 1.86274509804e-10}
          {2360.9467455621298, 1.64705882353e-10}
          {2578.4023668639056, 1.47058823529e-10}
          {2906.8047337278103, 1.23529411765e-10}
          {3000, 1.17647058824e-10}
        interp = piecewisecubic
        fununit = m^2/s
    ElectrolyteConductivity
      sigmal = int1(c/1[mol/m^3])
      int1: Interpolation
        table = 
          {8.88290254382, 0.0387596899225}
          {31.0901589034, 0.135658914729}
          {71.0461706335675, 0.302325581395}
          {124.215713019, 0.476744186047}
          {234.757553025, 0.736434108527}
          {415.714724136, 1.01162790698}
          {583.2026188365272, 1.16279069767}
          {785.7617813544294, 1.25968992248}
          {939.7633499283912, 1.27906976744}
          {1106.8846757143833, 1.26356589147}
          {1309.0857941758163, 1.1976744186}
          {1524.3981449907933, 1.09302325581}
          {1744.0666984928048, 0.968992248062}
          {2077.9768805837825, 0.786821705426}
          {2416.371138239105, 0.643410852713}
          {2790.024210598104, 0.531007751938}
          {3001.057082452431, 0.480620155039}
        interp = piecewisecubic
        fununit = S/m
    SpeciesProperties
      transpNum = int1(c/1[mol/m^3])
      fcl = int2(c/1[mol/m^3])
      int1: Interpolation
        table = 
          {17.6470588235, 0.566218809981}
          {357.352941176, 0.493282149712}
          {714.7058823529414, 0.424184261036}
          {1054.4117647058824, 0.362763915547}
          {1332.3529411764707, 0.320537428023}
          {1663.235294117647, 0.274472168906}
          {2033.8235294117646, 0.232245681382}
          {2448.529411764706, 0.190019193858}
          {2797.0588235294117, 0.166986564299}
          {2995.5882352941176, 0.15547024952}
      int2: Interpolation
        table = 
          {104.94588893, 0.0924855491329}
          {279.7418448519314, 0.109826589595}
          {429.5978774123868, 0.161849710983}
          {576.9714638974885, 0.231213872832}
          {714.3864004291363, 0.335260115607}
          {856.8047166475433, 0.450867052023}
          {994.2485188312301, 0.589595375723}
          {1126.708185096183, 0.739884393064}
          {1246.6930787382826, 0.901734104046}
          {1446.6887488904767, 1.19653179191}
          {1629.206266733058, 1.49132947977}
          {1796.7521330514126, 1.79768786127}
    ElectrolyteSaltConcentration
      cElsalt = 1000.0
  mat4: Common "LiPF6 in 1:2 EC:DMC and p(VdF-HFP) (Polymer, Li-ion Battery)" (disabled) on domains 1
    def "Basic"
      diffusion = 7.5e-11[m^2/s]
    ElectrolyteConductivity
      sigmal = sigmal_int1(c/c_ref)
      c_ref = 1000[mol/m^3]
      int1: Interpolation
        funcname = sigmal_int1
        table = 
          {0, 0.0108}
          {0.2000, 0.1259}
          {0.4000, 0.2055}
          {0.6000, 0.2553}
          {0.8000, 0.2810}
          {1.0000, 0.2873}
          {1.2000, 0.2788}
          {1.4000, 0.2595}
          {1.6000, 0.2331}
          {1.8000, 0.2027}
          {2.0000, 0.1710}
          {2.200, 0.1403}
          {2.4000, 0.1123}
          {2.6000, 0.0885}
          {2.8000, 0.0696}
          {3.0000, 0.0563}
    SpeciesProperties
      transpNum = 0.363
      fcl = 0
    ElectrolyteSaltConcentration
      cElsalt = 1000[mol/m^3]

Physics
  liion: LithiumIonBatteryMPH "Lithium-Ion Battery" on all domains
    dependent variable phil
    Ac.Ac = area_electrode
    ice1: Electrolyte (default) | ElectrolyteMaterial = mat3
    nf1: NoFlux (default)
    ins1: Insulation (default)
    init1: init "Initial Values 1" (default) | phil = 0; phis = mat2.elpot.Eeq_int1(socinit_LMO)
    sep1: Separator on domains 1 | ElectrolyteMaterial = mat3; epsl = eps_l_s
    pce1: PorousElectrode on domains 2
      ElectrolyteMaterial = mat3
      ElectrodeMaterial = mat2
      sigma_mat = from_mat
      epsl = eps_l_LMO
      epss = eps_s_LMO
      ElectricCorrModel = NoCorr
      FilmResistanceType = NoFilmResistance
      pin1: ParticleIntercalation (default)
        ParticleConcentrationType = BakerVerbrugge
        csinit = csinitLMO
        Ds_mat = from_mat
        ParticleMaterial = mat2
        cEeqref_mat = userdef
        cEeqref = csmaxLMO
        socmin_mat = userdef
        socmin = socinit_LMO
        socmax_mat = userdef
        socmax = socmax_LMO
        rp = rpLMO
        Nel = 10
      per1: PorousElectrodeReaction (default)
        MaterialOption = mat2
        ElectrodeKinetics = LithiumInsertion
        i0refType = userdef
        i0_ref = i0_ref_LMO
        alphaa = 0.5
        alphac = 0.5
        ilocmat_mat = FromKineticsExpression
      pdl1: PorousMatrixDoubleLayerCapacitance on all domains | Cdl = 5.0[F/m^2]
    es1: ElectrodeSurface on boundaries 1 | FilmResistanceType = NoFilmResistance; Rf = 0.01[ohm*m^2]
      er1: ElectrodeReaction on boundaries 1 | MaterialOption = mat1; ElectrodeKinetics = LithiumMetal; i0_ref = i0_ref_Li
    ec1: ElectrodeCurrent on boundaries 3 | Its = -Iapp; phis0init = mat2.elpot.Eeq_int1(socinit_LMO)
  ev: Events on all domains
    ds1: DiscreteStates | dim = Iapp; dimInit = I_1C*-0.193798738722
    expl0: ExplicitEvent | start = 0; reInitName = Iapp; reInitValue = I_1C*-0.193798738722
    expl1: ExplicitEvent | start = 6.66666666667; reInitName = Iapp; reInitValue = I_1C*-1.96302677235
    expl2: ExplicitEvent | start = 13.3333333333; reInitName = Iapp; reInitValue = I_1C*-0.381506339421
    expl3: ExplicitEvent | start = 20; reInitName = Iapp; reInitValue = I_1C*-0.572800793836
    expl4: ExplicitEvent | start = 26.6666666667; reInitName = Iapp; reInitValue = I_1C*1.06686518575
    expl5: ExplicitEvent | start = 33.3333333333; reInitName = Iapp; reInitValue = I_1C*-0.501610515788
    expl6: ExplicitEvent | start = 40; reInitName = Iapp; reInitValue = I_1C*0.420973031285
    expl7: ExplicitEvent | start = 46.6666666667; reInitName = Iapp; reInitValue = I_1C*0.102097914953
    expl8: ExplicitEvent | start = 53.3333333333; reInitName = Iapp; reInitValue = I_1C*-1.0566194043
    expl9: ExplicitEvent | start = 60; reInitName = Iapp; reInitValue = I_1C*0.20641471334
    expl10: ExplicitEvent | start = 66.6666666667; reInitName = Iapp; reInitValue = I_1C*0.271224110277
    expl11: ExplicitEvent | start = 73.3333333333; reInitName = Iapp; reInitValue = I_1C*0.136299302401
    expl12: ExplicitEvent | start = 80; reInitName = Iapp; reInitValue = I_1C*-0.481927941514
    expl13: ExplicitEvent | start = 86.6666666667; reInitName = Iapp; reInitValue = I_1C*0.311265378146
    expl14: ExplicitEvent | start = 93.3333333333; reInitName = Iapp; reInitValue = I_1C*-0.0721695617692
    expl15: ExplicitEvent | start = 100; reInitName = Iapp; reInitValue = I_1C*-0.853398122653
    expl16: ExplicitEvent | start = 106.666666667; reInitName = Iapp; reInitValue = I_1C*-1.87031301922
    expl17: ExplicitEvent | start = 113.333333333; reInitName = Iapp; reInitValue = I_1C*-0.313228312197
    expl18: ExplicitEvent | start = 120; reInitName = Iapp; reInitValue = I_1C*0.892215287529
    expl19: ExplicitEvent | start = 126.6666666666667; reInitName = Iapp; reInitValue = I_1C*0.371726511661
    expl20: ExplicitEvent | start = 133.333333333; reInitName = Iapp; reInitValue = I_1C*-0.361554612322
    expl21: ExplicitEvent | start = 140; reInitName = Iapp; reInitValue = I_1C*0.488242307132
    expl22: ExplicitEvent | start = 146.666666667; reInitName = Iapp; reInitValue = I_1C*1.59696804708
    expl23: ExplicitEvent | start = 153.333333333; reInitName = Iapp; reInitValue = I_1C*0.559694257562
    expl24: ExplicitEvent | start = 160; reInitName = Iapp; reInitValue = I_1C*0.670794297686
    expl25: ExplicitEvent | start = 166.666666667; reInitName = Iapp; reInitValue = I_1C*0.250499234612
    expl26: ExplicitEvent | start = 173.333333333; reInitName = Iapp; reInitValue = I_1C*0.176896205018
    expl27: ExplicitEvent | start = 180; reInitName = Iapp; reInitValue = I_1C*-0.0626480242525
    expl28: ExplicitEvent | start = 186.666666667; reInitName = Iapp; reInitValue = I_1C*0.488948649553
    expl29: ExplicitEvent | start = 193.3333333333333; reInitName = Iapp; reInitValue = I_1C*-0.13945972779

Mesh
  mesh1 "Mesh 1" (physics-controlled)

Studies
  std1 "Study 1"
    cdi: CurrentDistributionInitialization | initType = secondary
    time: Transient "Time Dependent" | tlist = range(0,0.666666666667,200.0)

Datasets
  dset3: Solution | solution = none
  dset4: Solution | solution = none

Tables
  tbl10: Table "Ref3C"
    Column 1 | Column 2
    0.000201 | 4.19481
    0.038064 | 4.1748
    0.229395 | 4.15475
    0.630183 | 4.13474
    1.31071 | 4.11472
    2.34771 | 4.09467
    4.08315 | 4.07466
    6.94541 | 4.0546
    12.0881 | 4.03459
    19.3568 | 4.01458
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  tbl9: Table "Ref2C"
    Column 1 | Column 2
    0.000134 | 4.22968
    0.040586 | 4.20963
    0.206697 | 4.18961
    0.543627 | 4.1696
    1.12233 | 4.14959
    2.05046 | 4.12957
    3.55125 | 4.10956
    6.019 | 4.08955
    11.3114 | 4.06953
    22.3621 | 4.04952
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  tbl3: Table "Ref1C"
    Column 1 | Column 2
    6.7e-05 | 4.2645
    0.047943 | 4.24445
    0.190229 | 4.2244
    0.46025 | 4.20439
    0.919426 | 4.18433
    1.68456 | 4.16432
    2.95722 | 4.14431
    5.25787 | 4.12425
    10.8173 | 4.10424
    26.0871 | 4.08423
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  tbl4: Table "RefC10"
    Column 1 | Column 2
    7e-06 | 4.295
    0.058086 | 4.27494
    0.177878 | 4.25493
    0.392901 | 4.23488
    0.78312 | 4.21487
    1.48315 | 4.19485
    2.7282 | 4.17484
    5.02013 | 4.15483
    10.1833 | 4.13481
    32.1991 | 4.1148
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  tbl11: Table "Probe Table 11"
    Time (h) | Cell voltage (V) | Insertion particle concentration, particle average (mol/m^3), Domain Probe 1 | Electrolyte potential (V), Domain Probe 2
    0 | 4.25451 | 6351.5 | -0.0106387
    2.09082e-06 | 4.25421 | 6351.55 | -0.0107002
    3.51497e-06 | 4.25386 | 6351.6 | -0.0107437
    6.36328e-06 | 4.25309 | 6351.68 | -0.0108117
    1.20599e-05 | 4.25141 | 6351.81 | -0.0108865
    1.77565e-05 | 4.24982 | 6351.93 | -0.0109444
    2.91497e-05 | 4.24696 | 6352.17 | -0.0110269
    5.19362e-05 | 4.24222 | 6352.65 | -0.0111387
    7.47227e-05 | 4.23816 | 6353.17 | -0.0112256
    0.000120296 | 4.23165 | 6354.29 | -0.0113609
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  tbl12: Table "Accumulated Probe Table 12"
    C_rate | Time (h) | Cell voltage (V), Global Variable Probe 1 - E cell | Insertion particle concentration, particle average (mol/m^3), Domain Probe 1
    0.1 | 0 | 4.29355 | 3808.47
    0.1 | 0.005 | 4.26596 | 3815.45
    0.1 | 0.01 | 4.25252 | 3823.72
    0.1 | 0.015 | 4.24416 | 3832.46
    0.1 | 0.02 | 4.23791 | 3841.41
    0.1 | 0.025 | 4.23305 | 3850.48
    0.1 | 0.03 | 4.22918 | 3859.64
    0.1 | 0.035 | 4.22612 | 3868.89
    0.1 | 0.04 | 4.22306 | 3878.13
    0.1 | 0.045 | 4.22056 | 3887.42
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
Plots
  pg2: PlotGroup1D "Rate Capability" | data = none
    tblp3: Table "Table Graph 3" | table = tbl4; xaxisdata = 1; plotcolumninput = manual; plotcolumns = 2
    tblp2: Table "Table Graph 2" | table = tbl3; xaxisdata = 1; plotcolumninput = manual; plotcolumns = 2
    tblp4: Table "Table Graph 4" | table = tbl9; xaxisdata = 1; plotcolumninput = manual; plotcolumns = 2
    tblp5: Table "Table Graph 5" | table = tbl10; xaxisdata = 1; plotcolumninput = manual; plotcolumns = 2
    glob1: Global | expr = liion.phis0_ec1; xdataexpr = (t*Iapp/mass_LMO)*0.277778/1000.0
  pg8: PlotGroup1D "Probe Plot Group 8"
    tblp1: Table "Probe Table Graph 1" | table = tbl11
  pg9: PlotGroup1D "Probe Plot Group 9"
    tblp1: Table "Probe Table Graph 1" | table = tbl11
  pg10: PlotGroup1D "Probe Plot Group 10"
    tblp1: Table "Probe Table Graph 1" | table = tbl11

Exports
  plot1: Plot
    filename = O:\a) Research area\01 - Batteries & Supercaps\EES Research GROUPS\99 - Old folders\6 - Computational Studies\01-WORK\Projects\Alexis_Blends\blended electrode\OierSimus\CP0_100\Validation\Crate_capability.txt
  plot2: Plot
    filename = O:\a) Research area\01 - Batteries & Supercaps\EES Research GROUPS\99 - Old folders\6 - Computational Studies\01-WORK\Projects\Alexis_Blends\blended electrode\OierSimus\CP0_100\Validation\ExpC10.txt
  plot3: Plot
    filename = O:\a) Research area\01 - Batteries & Supercaps\EES Research GROUPS\99 - Old folders\6 - Computational Studies\01-WORK\Projects\Alexis_Blends\blended electrode\OierSimus\CP0_100\Validation\Exp1C.txt
  plot4: Plot
    filename = O:\a) Research area\01 - Batteries & Supercaps\EES Research GROUPS\99 - Old folders\6 - Computational Studies\01-WORK\Projects\Alexis_Blends\blended electrode\OierSimus\CP0_100\Validation\Exp2C.txt
  plot5: Plot
    filename = O:\a) Research area\01 - Batteries & Supercaps\EES Research GROUPS\99 - Old folders\6 - Computational Studies\01-WORK\Projects\Alexis_Blends\blended electrode\OierSimus\CP0_100\Validation\Exp3C.txt
  plot6: Plot
    filename = O:\a) Research area\01 - Batteries & Supercaps\EES Research GROUPS\99 - Old folders\6 - Computational Studies\01-WORK\Projects\Alexis_Blends\blended electrode\OierSimus\CP0_100\voltage0100_h1h2_lowecond.txt